OpenVSP model (file version 5), 8 components.
Geometry view with OpenVSP parameter names; values to 6 digits, angles in degrees, lengths in the model's unit.
Overall bounding box: X_Min=-0.5 X_Len=26.3726 Y_Min=-12.5 Y_Len=25 Z_Min=-4.49273 Z_Len=12.5141

Fuselage "FuselageGeom"
  location (X Y Z) 0 0 0, rotation 0 0 0
  bounding box size 24.58 4.20196 5.20196
  Design: Length=24.58
  cross sections:
    n   XLocPercent  YLocPercent  ZLocPercent  shape
    0   0            0            0            ellipse Ellipse_Height=1 Ellipse_Width=2.8
    1   0.0488202    0            -0.0244101   circle Circle_Diameter=3.35
    2   0.150529     0            -0.0244101   ellipse Ellipse_Height=3.5 Ellipse_Width=4
    3   0.242188     0            0            ellipse Ellipse_Height=5 Ellipse_Width=4.2
    4   0.34581      0            0            as above
    5   0.447518     0            0.0081367    ellipse Ellipse_Height=4.2 Ellipse_Width=3.5
    6   0.569569     0            0.0081367    ellipse Ellipse_Height=3 Ellipse_Width=2.5
    7   0.691619     0            0.0162734    ellipse Ellipse_Height=2.3 Ellipse_Width=1.6
    8   0.854353     0            0.0284784    ellipse Ellipse_Height=1.5 Ellipse_Width=1
    9   0.927177     0            0.0284784    ellipse Ellipse_Height=1 Ellipse_Width=0.5
    10  1            0            0.0284784    ellipse Ellipse_Height=1 Ellipse_Width=0

Wing "WingGeom", child of "FuselageGeom"
  location (X Y Z) 6.55738 0 2.45902, rotation 0 0 0
  symmetric about XZ
  bounding box size 4 25 0.400232
  totals: TotalSpan=25 TotalProjectedSpan=25 TotalChord=3.5 TotalArea=87.5 TotalAR=7.14286 MAC=3.52381
  root: chord 4, twist 0, NACA 4-series Camber=0 CamberLoc=0.2 ThickChord=0.1
  sections:
    n  Span  Root_Chord  Tip_Chord  Area   Sweep  Sweep_Location  Dihedral  Twist  Twist_Location  tip airfoil
    1  12.5  4           3          43.75  0      0               0         0      0.25            as above

Wing "WingGeom", child of "FuselageGeom"
  location (X Y Z) 20 0 0.737705, rotation 0 0 0
  symmetric about XZ
  bounding box size 4.5 10 0.450261
  totals: TotalSpan=10 TotalProjectedSpan=10 TotalChord=3.75 TotalArea=37.5 TotalAR=2.66667 MAC=3.8
  root: chord 4.5, twist 0, NACA 4-series Camber=0 CamberLoc=0.2 ThickChord=0.1
  sections:
    n  Span  Root_Chord  Tip_Chord  Area   Sweep  Sweep_Location  Dihedral  Twist  Twist_Location  tip airfoil
    1  5     4.5         3          18.75  8      0               0         0      0.25            as above

Wing "WingGeom", child of "FuselageGeom"
  location (X Y Z) 19.7541 0 0.901639, rotation 90 0 0
  bounding box size 6.1185 0.472496 7.11971
  totals: TotalSpan=7.11971 TotalProjectedSpan=7.11971 TotalChord=3.36508 TotalArea=23.9584 TotalAR=2.11576 MAC=3.54753
  root: chord 4.72222, twist 0, NACA 4-series Camber=0 CamberLoc=0.2 ThickChord=0.1
  sections:
    n  Span     Root_Chord  Tip_Chord  Area     Sweep  Sweep_Location  Dihedral  Twist  Twist_Location  tip airfoil
    1  7.11971  4.72222     2.00794    23.9584  30     0               0         0      0.25            as above

Wing "WingGeom", child of "FuselageGeom"
  location (X Y Z) 12.8525 0 0.92, rotation 90 0 0
  bounding box size 12.223 0.742384 4.44879
  totals: TotalSpan=4.44879 TotalProjectedSpan=4.44879 TotalChord=3.70977 TotalArea=16.504 TotalAR=1.19921 MAC=4.94635
  root: chord 7.41953, twist 0, NACA 4-series Camber=0 CamberLoc=0.2 ThickChord=0.1
  sections:
    n  Span     Root_Chord  Tip_Chord  Area    Sweep  Sweep_Location  Dihedral  Twist  Twist_Location  tip airfoil
    1  4.44879  7.41953     0          16.504  70     0               0         0      0.25            as above

Ellipsoid "EllipsoidGeom"
  location (X Y Z) -0.5 0 0, rotation 0 0 0
  bounding box size 1 3 1
  Design: A_Radius=0.5 B_Radius=1.5 C_Radius=0.5

Propeller "PropGeom", child of "EllipsoidGeom"
  location (X Y Z) 0 0 0, rotation 0 0 0
  bounding box size 0.493504 7.85259 8.98545
  Design: Diameter=10 NumBlade=3 Beta34=20 UseBeta34Flag=1 Feather=0 Rotate=0 Precone=0 ReverseFlag=0 FoldAngle=0 PropMode=0 AF=152.312 CLi=0.54042 Chord=0.174696 Solidity=0.166823 ConstructXoC=0.5 FeatherAxisXoC=0.5 FeatherOffsetXoC=0
  cross sections:
    n  RadiusFrac  shape
    0  0.0622951   ellipse Ellipse_Height=0.2 Ellipse_Width=0.4
    1  0.4         NACA 16-series Chord=0.903958 IdealCl=0.7 ThickChord=0.144074
    2  1           NACA 16-series Chord=0.65 IdealCl=0.2 ThickChord=0.03
  Chord along r/R (cubic Bezier): 0.0622951: 0.08, 0.24153: 0.15, 0.420765: 0.2, 0.6: 0.2, 0.716667: 0.2, 0.833333: 0.2, 0.95: 0.2, 0.966667: 0.2, 0.983333: 0.2, 1: 0.13
  Twist along r/R (PCHIP): 0.0622951: 46.75, 0.75: 20, 1: 13
  Thick along r/R (cubic Bezier): 0.0622951: 0.5, 0.14153: 0.3, 0.220765: 0.225, 0.3: 0.2, 0.4: 0.125, 0.5: 0.115, 0.6: 0.1, 0.733333: 0.075, 0.866667: 0.055, 1: 0.03
  CLI along r/R (cubic Bezier): 0.0622951: 0, 0.174863: 0.7, 0.287432: 0.7, 0.4: 0.7, 0.466667: 0.7, 0.533333: 0.7, 0.6: 0.7, 0.733333: 0.7, 0.866667: 0.7, 1: 0.2

Human "HumanGeom"
  location (X Y Z) 8.47826 0 0, rotation 0 0 0
  bounding box size 1.92541 1.97235 4.07432
  mass: Density=68.4766 Shell_Flag=0 Mass_Area=1 Mass_Prior=0
  Anthropometric: Age=30 AutoDensity=1 BMI=27.7 BMI_pct=0.5 GenderFlag=0 LenUnit=4 Mass=137.403 MassUnit=3 SitFrac=0.51 Stature=4.92126 Stature_pct=0.05 Volume=2.00657
